# OpenSim document version 40600
Model original_schematic_lower_limbs:
  gravity: 0 -9.80665 0
  Ground
  BodySet:
    Body pelvis: mass=10 [kg] mass_center=(0 0 0) inertia=(0.1 0.1 0.1 0 0 0)
      PhysicalOffsetFrame pelvis_shape: socket_parent=.. translation=(0 0 0) [meters]
        Brick pelvis_shape_geom_1: half_lengths=(0.14 0.07 0.1)
    Body femur_r: mass=7 mass_center=(0 -0.2 0) inertia=(0.1 0.1 0.1 0 0 0)
      PhysicalOffsetFrame femur_r_shape: socket_parent=.. translation=(0 -0.2 0)
        Brick femur_r_shape_geom_1: half_lengths=(0.045 0.2 0.045)
    Body tibia_r: mass=3.5 mass_center=(0 -0.2 0) inertia=(0.1 0.1 0.1 0 0 0)
      PhysicalOffsetFrame tibia_r_shape: socket_parent=.. translation=(0 -0.2 0)
        Brick tibia_r_shape_geom_1: half_lengths=(0.035 0.2 0.035)
    Body calcn_r: mass=1 mass_center=(0.07 -0.03 0) inertia=(0.1 0.1 0.1 0 0 0)
      PhysicalOffsetFrame calcn_r_shape: socket_parent=.. translation=(0.07 -0.03 0)
        Brick calcn_r_shape_geom_1: half_lengths=(0.11 0.03 0.045)
    Body femur_l: mass=7 mass_center=(0 -0.2 0) inertia=(0.1 0.1 0.1 0 0 0)
      PhysicalOffsetFrame femur_l_shape: socket_parent=.. translation=(0 -0.2 0)
        Brick femur_l_shape_geom_1: half_lengths=(0.045 0.2 0.045)
    Body tibia_l: mass=3.5 mass_center=(0 -0.2 0) inertia=(0.1 0.1 0.1 0 0 0)
      PhysicalOffsetFrame tibia_l_shape: socket_parent=.. translation=(0 -0.2 0)
        Brick tibia_l_shape_geom_1: half_lengths=(0.035 0.2 0.035)
    Body calcn_l: mass=1 mass_center=(0.07 -0.03 0) inertia=(0.1 0.1 0.1 0 0 0)
      PhysicalOffsetFrame calcn_l_shape: socket_parent=.. translation=(0.07 -0.03 0)
        Brick calcn_l_shape_geom_1: half_lengths=(0.11 0.03 0.045)
  JointSet:
    WeldJoint pelvis_ground: socket_parent_frame=ground_offset socket_child_frame=pelvis_offset
      PhysicalOffsetFrame ground_offset: socket_parent=/ground translation=(0 1 0)
      PhysicalOffsetFrame pelvis_offset: socket_parent=/bodyset/pelvis translation=(0 0 0)
    PinJoint hip_r: socket_parent_frame=pelvis_offset socket_child_frame=femur_r_offset
      Coordinate hip_flexion_r
      PhysicalOffsetFrame pelvis_offset: socket_parent=/bodyset/pelvis translation=(0 -0.04 -0.1)
      PhysicalOffsetFrame femur_r_offset: socket_parent=/bodyset/femur_r translation=(0 0 0)
    PinJoint knee_r: socket_parent_frame=femur_r_offset socket_child_frame=tibia_r_offset
      Coordinate knee_angle_r
      PhysicalOffsetFrame femur_r_offset: socket_parent=/bodyset/femur_r translation=(0 -0.4 0)
      PhysicalOffsetFrame tibia_r_offset: socket_parent=/bodyset/tibia_r translation=(0 0 0)
    PinJoint ankle_r: socket_parent_frame=tibia_r_offset socket_child_frame=calcn_r_offset
      Coordinate ankle_angle_r
      PhysicalOffsetFrame tibia_r_offset: socket_parent=/bodyset/tibia_r translation=(0 -0.4 0)
      PhysicalOffsetFrame calcn_r_offset: socket_parent=/bodyset/calcn_r translation=(0 0 0)
    PinJoint hip_l: socket_parent_frame=pelvis_offset socket_child_frame=femur_l_offset
      Coordinate hip_flexion_l
      PhysicalOffsetFrame pelvis_offset: socket_parent=/bodyset/pelvis translation=(0 -0.04 0.1)
      PhysicalOffsetFrame femur_l_offset: socket_parent=/bodyset/femur_l translation=(0 0 0)
    PinJoint knee_l: socket_parent_frame=femur_l_offset socket_child_frame=tibia_l_offset
      Coordinate knee_angle_l
      PhysicalOffsetFrame femur_l_offset: socket_parent=/bodyset/femur_l translation=(0 -0.4 0)
      PhysicalOffsetFrame tibia_l_offset: socket_parent=/bodyset/tibia_l translation=(0 0 0)
    PinJoint ankle_l: socket_parent_frame=tibia_l_offset socket_child_frame=calcn_l_offset
      Coordinate ankle_angle_l
      PhysicalOffsetFrame tibia_l_offset: socket_parent=/bodyset/tibia_l translation=(0 -0.4 0)
      PhysicalOffsetFrame calcn_l_offset: socket_parent=/bodyset/calcn_l translation=(0 0 0)
