# OpenSim document version 40600
Model mcp_pin:
  gravity: 0 0 0
  Ground
  BodySet:
    Body block: mass=1 [kg] mass_center=(0 0 0) inertia=(1 1 1 0 0 0)
  JointSet:
    PinJoint pin: socket_parent_frame=ground_offset socket_child_frame=block_offset
      Coordinate angle
      PhysicalOffsetFrame ground_offset: socket_parent=/ground translation=(0 0 0) [meters]
      PhysicalOffsetFrame block_offset: socket_parent=/bodyset/block translation=(0 0 0)
  ForceSet:
    CoordinateActuator torque: min_control=-50 max_control=50 coordinate=angle optimal_force=1
