# OpenSim document version 40000
Model mcp_moco_slider:
  length_units: meters
  force_units: N
  gravity: 0 0 0
  credits:
    Original analytic fixture for OpenSim MCP: a 2 kg mass, no gravity, one coordinate actuator.
  Ground
  BodySet:
    Body block: mass=2 mass_center=(0 0 0) inertia=(1 1 1 0 0 0)
  JointSet:
    SliderJoint slider: socket_parent_frame=/ground socket_child_frame=/bodyset/block
      Coordinate slider_tx: default_value=0 range=(-2 2) clamped=false
  ForceSet:
    CoordinateActuator actuator: coordinate=slider_tx optimal_force=1 min_control=-50 max_control=50
