# OpenSim document version 40000
Model mcp_muscle_slider:
  gravity: -10 0 0
  Ground
  BodySet:
    Body block: mass=2 mass_center=(0 0 0) inertia=(1 1 1 0 0 0)
  JointSet:
    SliderJoint slider: socket_parent_frame=ground_offset socket_child_frame=block_offset
      Coordinate slider_tx: range=(-0.1 0.1)
      PhysicalOffsetFrame ground_offset: socket_parent=/ground translation=(0 0 0)
      PhysicalOffsetFrame block_offset: socket_parent=/bodyset/block translation=(0 0 0)
  ForceSet:
    Millard2012EquilibriumMuscle puller: min_control=0.01 max_control=1 max_isometric_force=100
        optimal_fiber_length=0.6 tendon_slack_length=0.4 pennation_angle_at_optimal=0 ignore_tendon_compliance=true
        ignore_activation_dynamics=true
      PathPoint origin: ground (1 0 0)
      PathPoint insertion: block (0 0 0)
      ActiveForceLengthCurve: minimum_value=0
      ForceVelocityCurve: concentric_slope_at_vmax=0 concentric_slope_near_vmax=0.25 isometric_slope=5
          eccentric_slope_at_vmax=0 eccentric_slope_near_vmax=0.15 max_eccentric_velocity_force_multiplier=1.4
      FiberForceLengthCurve
      TendonForceLengthCurve
  MarkerSet:
    Marker M1: block (0 0 0)
    Marker M2: block (0 0.1 0)
    Marker M3: block (0 0 0.1)
