# OpenSim document version 40000
Model mcp_slider:
  length_units: meters
  force_units: N
  gravity: 0 -9.80665 0
  credits:
    Original analytic test fixture created for OpenSim MCP. Synthetic, not a human model.
  Ground
  BodySet:
    Body block: mass=1 mass_center=(0 0 0) inertia=(1 1 1 0 0 0) meshes=Geometry/block.obj
  JointSet:
    SliderJoint slider: socket_parent_frame=/ground socket_child_frame=/bodyset/block
      Coordinate slider_tx: default_value=0 range=(-1 1) clamped=false
  MarkerSet:
    Marker M1: block (0 0 0)
    Marker M2: block (0 0.1 0)
    Marker M3: block (0 0 0.1)
